// SBML level 3 version 1

model EnzymaticRxnModelnew()
  // model units - substance: count, time: seconds, extent: mole

  // Compartments:
  compartment cellnew = 1 litre;

  // Species:
  species inp_DPnew in cell = 50/cell;
  species X_DPnew in cell = 50/cell;
  species C1_DPnew in cell = 0;
  species Xp_DPnew in cell = 0;
  species E_DPnew in cell = 50/cell;
  species C2_DPnew in cell = 0;
  species C3_DPnew in cell = 0;
  species out_DPnew in cell = 0;
  species C4_DPnew in cell = 0;

  // Parameters:
  k1fnew = 1 per_second;
  k1rnew = 1 per_second;
  k2fnew = 1 per_second;
  k3fnew = 1 per_second;
  k3rnew = 1 per_second;
  k4fnew = 1 per_second;
  k5fnew = 1 per_second;
  k5rnew = 1 per_second;
  k6fnew = 1 per_second;
  k7fnew = 1 per_second;
  k7rnew = 1 per_second;
  k8fnew = 1 per_second;

  // Reactions:
  r1new: inp_DPnew + X_DPnew -> C1_DPnew; k1fnew*inp_DPnew*X_DPnew - k1rnew*C1_DPnew;
  r2new: C1_DPnew => inp_DPnew + Xp_DPnew; k2fnew*C1_DPnew;
  r3new: E_DPnew + Xp_DPnew -> C2_DPnew; k3fnew*E_DPnew*Xp_DPnew - k3rnew*C2_DPnew;
  r4new: C2_DPnew => E_DPnew + X_DPnew; k4fnew*C2_DPnew;
  r5new: inp_DPnew + Xp_DPnew -> C3_DPnew; k5fnew*inp_DPnew*Xp_DPnew - k5rnew*C3_DPnew;
  r6new: C3_DPnew => out_DPnew + inp_DPnew; k6fnew*C3_DPnew;
  r7new: E_DPnew + out_DPnew -> C4_DPnew; k7fnew*E_DPnew*out_DPnew - k7rnew*C4_DPnew;
  r8new: C4_DPnew => Xp_DPnew + E_DPnew; k8fnew*C4_DPnew;

  // Unit definitions:
  unit per_secondnew = 1 / second;
end
